E := 60
Ik := 25
RE := 16
R1 := 10
R2 := 60
R3 := 68
R4 := 10
R5 := 10
R6 := 15
R7 := 80
R8 := 50
Rk := 1*10^-8
G11 := 1/Rk + 1/R1 + 1/R2 = 100000000
G22 := 1/RE + 1/R3 + 1/(R4 + R5) + 1/R6 = 0.193873
G33 := 1/R6 + 1/R7 + 1/R8 = 0.0991667
G44 := 1/RE + 1/RE + 1/(R4 + R5) = 0.175
G12 := 0
G21 := G12
G13 := 0
G31 := G13
G14 := 1/R1 + 1/R2
G41 := G14
G23 := 1/R6
G32 := G23
G24 := 1/(R4 + R5)
G42 := G24
G34 := 1/R7 + 1/R8
G43 := G34
Δ := [G11, -G12, -G13, -G14; -G21, G22, -G23, -G24; -G31, -G32, G33, -G34; -G41, -G42, -G43, G44]
